// SBML level 2 version 4

model main()

  // Compartments:
  compartment cell = 1;

  // Species:
  species species_m in cell = 10/cell;
  species species_p1 in cell = 5/cell;
  species species_p2 in cell = 0;

  // Parameters:
  parameter_0 = 10;
  parameter_1 = 0.5;
  parameter_2 = 10;
  parameter_3 = 2;
  parameter_4 = 1;

  // Reactions:
  reaction_0: species_m -> species_p1; parameter_0*species_m;
  reaction_1: species_p1 -> species_p2; parameter_1*species_p1;
  reaction_2: -> species_m; parameter_2*species_p1;
  reaction_3: species_p2 -> ; parameter_4*species_p2;
  reaction_4: species_p1 -> ; parameter_4*species_p1;
  reaction_5: species_m -> ; parameter_4*species_m;
  reaction_6: species_m -> ; parameter_3*species_p2*species_m;
end
